# 18/19 Angabe Haupttermin
# Aufgabe 1
# a)
X := [7.7; 7.6; 7.9; 7.4; 6.8; 7.3; 7.4; 7.8; 7.5]
Stdev(X) = 0.325747  # Standardabweichung
mean(X) = 7.48889  # arithmetisches Mittel
# 1)
median(X) = 7.5  # Mittelwert
# b)
d := 457.2/1000 = 0.4572
r := d/2 = 0.2286
G := π*r^2 = 0.164173
V := G*416000 → 68296.0608627  # m^3
V/0.159 → 429534.973979  # Barrels
# c)
f(x) := k*x + d
f(x) := 6000/5*x
# 2) Gerade Linie bei 1200 einzeichnen
# Aufgabe 2
# a)
N(t) := 18*e^(-λ*t)  # error: Diese Variable ist nicht definiert. Prüfen Sie, ob die Beschriftung richtig festgelegt ist.
λ := 0.8*18 == 18*e^(-λ*4) solve, λ → 0.0557858878286
# 1)
N(t) := 18*e^(-λ*t)
# 2)
# Der Vitamingehalt liegt bei
N(36) → 2.415919104
# b)
μ := 100
σ := 5
# 1)
pnorm(110, μ, σ) - pnorm(92, μ, σ) = 0.922451  # 92.2%
# c)
c(t) := 24*(e^(-0.0195*t) - e^(-1.3*t)) + 3
c'(t) := d/dt(c(t))
c'(t) == 0 solve, t → 3.27973844426
# 1)
c(3.27973844426) → 25.1754382861
# 2) 25.18
# Aufgabe 3
# a)
# 1)
(a - 7)/a
# 2)
# 3)
(7/a)^2 == 0.1225 solve, a → [20.0; -20.0]
a := 20
# b)
n := 5
p := 6/8
# P(X =3)
dbinom(3, n, p) = 0.263672  # 26.4%
# c) | 7/12 | grün | 5/12 | gelb
n := 3
# mindestens 1 Grün 1 - (5/12)^3
# Aufgabe 4
# a)
2.583*81.83 = 211.367
211.367 - 13.7 = 197.667
# 1)
197.667/1.75 = 112.953  # km/h
α := atan(0.0084) = 0.481273 deg
# b)
h := 27300*sin(α) = 229.312  # m
# c)
# 1)
235.1 - 209.3 = 25.8  # Millionen
# 2) | Die Anzahl der Fahrgäste von 2014 war 12% höher als 2010
# Aufgabe 5
clear(a)
E(t) := 80*a^t  # error: Diese Variable ist nicht definiert. Prüfen Sie, ob die Beschriftung richtig festgelegt ist.
# Die Beleuchtungsstärke bei Sonnenaufgang ist 80 Lux
a^5 == 2
nthroot(2, 5) = 1.1487
a := 1.149
# b) | ????
# c)
# 1) Nach 33 Tagen
# 2) Der Parameter a muss negativ sein da die Funktion fällt.
# Aufgabe 6
# a)
μ := 500
σ := 4.5
α := 0.01
n := 10
# 1)
μ + qnorm(1 - α/2, 0, 1)*σ/sqrt(n) = 503.665
# [496.335/503.665]
μ - qnorm(1 - α/2, 0, 1)*σ/sqrt(n) = 496.335
# 2)
# Die Standardabweichung einer Stichprobe ist umso größer, je kleiner der Stichprobenumfang n ist.
# b)
g(x) := -0.00108*x^3 + 0.046*x^2 - 0.4367*x + 3
# 1)
g(6)*2 = 3.60504
# 2)
π*integral(g(x)^2, x = 2 .. 25) = 678.645  # 0.68 Liter  # ??????????
# Aufgabe 7
# a)
# 1)
(3.6 - 1.4)/(4 - 2) = 1.1  # die mittlere Änderungsrate in 2 Tagen
# 2)
clear(x, a, b, c, f)
f(x, a, b, c) := a*x^2 + b*x + c
X := [1; 2; 3; 4; 5; 6; 7]
Y := [0.7; 1.4; 2.3; 3.6; 5.2; 7.3; 9.7]
vg := [1; 1; 1]
[a; b; c] := genfit(X, Y, vg, f) = [0.179762; 0.0511905; 0.514286]
f(x) := a*x^2 + b*x + c → 0.17976190476*x^2 + 0.0511904761884*x + 0.514285714285
# 3)
f(x) == 11 solve, x; assume, x ≥ 0 → 7.49642464031
z(t) := 0.25*t^2 - 4.1*t + 17
z(7.49642464031) = 0.313755  # 3.14 %
# b) | 1 Bild Rechts Richtig
# c)
# 1)
dT/dt == k*(20 - T)
# =????
# Aufgabe 8
# a)
# 1)
m'(t) := 1.2*e^(-0.04*t) - 0.1
integral(m'(t), t) simplify → -30.0*e^(-0.04*t) - 0.1*t  # +C
# 2)
# Nach rund 62 Minuten
m(t) := -30.0*e^(-0.04*t) - 0.1*t + C
m(0) == 10 solve, C → 40.0
m(t) := -30.0*e^(-0.04*t) - 0.1*t + 40
m(t) == 0 solve, t → 399.999966239
# Nach rund 400 Mintuen ist der Wirkstoff vollständig abgebaut.
clear(a, f)
# b)
f(t) := a*sin(π/12*t) + 135  # error: Diese Variable ist nicht definiert. Prüfen Sie, ob die Beschriftung richtig festgelegt ist.
# 1) | ???
# 2) | ???
# 3)
f'(t) := a*sin(π/12*t) + 145  # error: Diese Variable ist nicht definiert. Prüfen Sie, ob die Beschriftung richtig festgelegt ist.
# Aufgabe 9
# a)
# ?????
