# Aufgabe 1
# a)
# 1)
7.3*10^3
# 2)
m := μ*V  # error: Diese Variable ist nicht definiert. Prüfen Sie, ob die Beschriftung richtig festgelegt ist.
m := 7300*1000 → 7300000
μ := 7800
V := m/μ = 935.897
V/125^2 → 0.0598974358974  # m
0.0598974358974*100 → 5.98974358974  # rund 6 cm
# b)
k := (3594000 - 1027000)/30 → 256700/3 = 85566.7
# 1)
b(t) := k*t + 1027000
# c)
# 1)
H - h
d*tan(α - β)
# Aufgabe 2
# a)
# 1)
(1.5 + 3.5 + 0.7)/3 = 1.9
s := 1.9*20 = 38  # m
# 2)
3.5*3.6 = 12.6  # Erreicht eine maximale Geschwindigkeit von 12.6km/h
# b)
# 1)
m(t) := 1/175*(-17*t^4 + 204*t^3 - 922.5*t^2 + 1863*t)
m'(t) := d/dt(m(t))
m'(t) == 0 solve, t; assume, t ≥ 0 → 3
m(3) → 8.1  # m^3
# c)
# 1) | 1 Rechte Spalte
# Aufgabe 3
# a)
W(d) := a*d^2  # error: Diese Variable ist nicht definiert. Prüfen Sie, ob die Beschriftung richtig festgelegt ist.
# 1)
a := W(45) == 5 solve, a → 1/405 = 0.00246914
# 2)
d_1 := 45
d_2 := 45*1.1 = 49.5
W_1(d) := a*d_1^2 = 5
6.05 - 5 = 1.05
5*0.01 = 0.05
W_2(d) := a*d_2^2 = 6.05
# 1.05 ist mehr als 10%(0.05)
# b)
# 1)
Z(x) := -0.024*x^2 - 2.16*x + 252
Z(4) → 242.976
# Ist um
242.976 - 199.2 = 43.776  # Sekunden kürzer
Z(20) → 199.2
# c)
# 1)
μ := 5.5
σ := 0.35
α := 0.1
n := 1
μ - qnorm(1 - α/2, 0, 1)*σ/sqrt(n) = 4.9243
# [4.924/6.076]
μ + qnorm(1 - α/2, 0, 1)*σ/sqrt(n) = 6.0757
# 2) | P(8 ≤ X ≤ 10) = 1 – P(X ≥ 10) | ??
# Aufgabe 4
# a) | y/x
4/10 = 0.4
# 1) | E ist richtig
# 2)
α := atan(0.4) = 21.8014 deg
h := 180*sin(α) = 66.8503  # 66.85m
# b)
# 1 und 0
d := 2
# c) | 1)
x*1.0504 == 834 solve, x → 793.983244478
# 793.98 mio Euro
# Bsp.5)a)1)
n := 13
p := 0.1
μ := n*p = 1.3
# 2)
1 - pbinom(0, n, p) = 0.745813
dbinom(0, n, p) = 0.254187
# 3)
# P(7 <= X <= 13)=
1 - pbinom(6, n, p) = 9.92855e-5
# Die Wahrscheinlichkeit beträgt 0.00009929%
# b)1)
# D B
# c)1)
p_1*(1 - p_2) + (1 - p_1)
# Bsp.6)a)1)
f(x) := 37/19^6*x^6 + 3 → 37*x^6/47045881 + 3
f(-x) → 37*x^6/47045881 + 3
# 2)
f(y) := f(x) == y solve, x; assume, x == real → [-((47045881*y - 141137643)/37)^(1/6); ((47045881*y - 141137643)/37)^(1/6)]
π*integral((((47045881*y - 141137643)/37)^(1/6))^2, y = 3 .. 40) = 31471.7
# b)1)
σ := 1
μ := 150
# 3)
clear(σ)
# P(X <= 151)=0.923
z := qnorm(0.923, 0, 1)
(151 - μ)/σ == z solve, σ → 1.0/qnorm(0.923, 0.0, 1.0) = 0.701487
# c)1)
E(x) := 20*x - 0.12*x^2
E(x) == 100 solve, x → [5.15973733628; 161.50692933]
# Bsp.7)a)1)
r := sqrt(a^2 + (r - h)^2)  # error: Diese Variable ist nicht definiert. Prüfen Sie, ob die Beschriftung richtig festgelegt ist.
# b)1)
f(x) := 30*(1 - e^((x - 35)/13))
x_res := f(x) == 21 solve, x → 13*ln(3/10) + 35 = 19.3484
PQ := 2*x_res = 38.6967
# Die Länge vom Vektor PQ beträgt ca. 38.4
# 2)
f'(x) := d/dx(f(x)) → -(30*e^((x - 35)/13))/13
x_a := f'(0) = -0.156287
α_1 := atan(x_a) = -8.88274 deg
π - |2*α_1| = 162.235 deg
# 3)
# Es wird die Länge des Bogens berechnet
# c)1)
A := [-45; 0]
AB := [78; 4.2]
B := AB + A → [33.0; 4.2]
# 2)
g(t) := [33; 4.2] + t*[-78; 4.2]
# d)1)
# 5000
# 2)
X := [182; 192; 183; 185; 189; 185; 179; 189; 192]
μ := mean(X) = 186.222
σ := Stdev(X) = 4.54911
n := rows(X) = 9
α := 0.05
z := qt(1 - α/2, n - 1) = 2.306
μ_o := μ + z*σ/sqrt(n) = 189.719
μ_u := μ - z*σ/sqrt(n) = 182.725
# Der 95%-ige Vertrauensbereich beträgt [182.73/189.72]
# Bsp.8)a)1)
clear(a, b, c)
T_F(x) := a + b*e^(c_1*x)  # error: Diese Variable ist nicht definiert. Prüfen Sie, ob die Beschriftung richtig festgelegt ist.
a := 4
b := 10 == a + b solve, b → 6
T_F(x) := a + b*e^(c*x)
T_F(6) == 7 solve, c → -ln(2)/6 = -0.115525
# 2)
x_1 := 6
# b)1)
# 5te Aussage
# c)1)
# S(4/a)
# 2)
clear(a, b, c, d)
ρ(T) := a - b*(T - 4)^2  # error: Diese Variable ist nicht definiert. Prüfen Sie, ob die Beschriftung richtig festgelegt ist.
ρ'(T) := d/dT(ρ(T)) → (-(2*T) + 8)*b
ρ''(T) := d/dT(ρ'(T)) → -(2*b)
# Es liegt ein Hochpunkt vor da die 2. Ableitung negativ ist.
# 3)
a := 999.972
b := 0.007
ρ(T) := a - b*(T - 4)^2
ρ'(T) := d/dT(ρ(T)) → -0.014*T + 0.056
T_1 := ρ'(T) == 0.028 solve, T → 2.0
ρ(T_1) == 0.028*T_1 + d solve, d → 999.888
# 4)
|ρ(10) - 999.7| = 0.02
# Der Betrag des absoluten Fehlers betrögt ca. 0.02kg/m^3
