# Matura Haupttermin 20/21
# Zirkus
(a)
65*x + 57*y == 1179
82*x + 74*y == 1502
[x, y] := [65*x + 57*y == 1179; 82*x + 74*y == 1502] solve, x, y → [12, 7]
(b)
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(c)
(1)
μ := 120
σ := 5
1 - pnorm(118, μ, σ) = 0.655422
# Bäume
clear(x)
(2)
f(x) := 0.0047*x^3 - 0.2*x^2 + 1.28*x
f(x) == 0 solve, x → [0.0; 7.84703503144; 34.7061564579]
(3)
2*integral(f(x), x = 0 .. 7.84703503144) → 23.3023234329
(b)
(1)
a := 30000*2.14 = 64200
b := a*14.5 = 930900
b := b/1000 = 930.9
b/1000 = 0.9309
(2)
n(x) := 0.816/0.931*x
# Aufgabe 3
# Sonnenlicht und Vitamin D
(b)
(1)
N(t) := N_0*e^(-0.0173*t)  # error: Diese Variable ist nicht definiert. Prüfen Sie, ob die Beschriftung richtig festgelegt ist.
30 == N_0*e^(-0.0173*60) solve, N_0 → 84.7069270496
# Aufgabe 4
# Steig- bzw. Sinkflug von Flugzeugen
(a)
(1)
h_1(t) := -90*t + 12000
(2)
h_1(28) → 9480
(b)
(1)
# bei 600
# Aufgabe 5
# Darts
A_1 := 17^2*π = 907.92
A_2 := 22.5^2*π → 1590.43128088
A_2 := 1590.43128088 - 804.248 = 786.183
907.92/1590.43128088 = 0.570864
(b)
clear(a, b, c, x, f)
α == 2*atan(D/2/L)
(c)
f(x) := a*x^2 + b*x + c  # error: Diese Variable ist nicht definiert. Prüfen Sie, ob die Beschriftung richtig festgelegt ist.
f'(x) := d/dx(f(x)) → 2*a*x + b
[a, b, c] := [f'(75) == 0; f(0) == 173; f(75) == 182] solve, a, b, c → [-1/625, 6/25, 173]
f(x) := a*x^2 + b*x + c → -x^2/625 + 6*x/25 + 173
# Aufgabe 6
# Olympische Sommerspiele 2008 in Peking
(a)
(1)
v_B(t) := 12.151*(1 - e^(-0.684*t))
v_T(t) := 12.15*(1 - e^(-0.601*t))
v'_B(t) := d/dt(v_B(t)) → 8.311284*2.71828182846^(-0.684*t)
v'_B(1) → 4.1938287922
(3)
100 - integral(v_T(t), t = 0 .. 9.69) → 2.42303311222
(c)
X := [1000; 2000; 3000; 4000; 5000]
Y := [180.5; 360.2; 543.8; 726.6; 910]
f(x, k, d) := k*x + d
vg := [1; 1]
[k; d] := genfit(X, Y, vg, f) = [0.18254; -3.4]
f(x) := k*x + d → 0.182539999998*x - 3.40000000001
f(10000) → 1821.99999998
t := 1794.66
|(t - 1822)/1794.66| = 0.0152341
# Aufgabe 9
# Meerwasser und mehr Wasser
(a)
(2)
dV/dt == 0.001*(350 - V)
dV/(350 - V) == 0.001*dt
integral(1/(350 - V), V) == integral(0.001, t)
-|ln(350 - V)| == 0.001*t + C
|ln(350 - V)| == -0.001*t - C
350 - V == e^(-0.001*t)*C
V(t) := -e^(-0.001*t)*C + 350
V(0) == 150 solve, C → 200.0
V(t) := 350 - 200*e^(-0.001*t)
(b)
h'(t) := 1.5*t*e^(-0.3*t)
h'(t) == 1 solve, t → 0.86390367273
(c)
clear(a, b)
f(t) := a + b*cos(0.507*t)  # error: Diese Variable ist nicht definiert. Prüfen Sie, ob die Beschriftung richtig festgelegt ist.
f'(t) := d/dt(f(t)) → -0.507*b*sin(0.507*t)
[f(0) == 2; f'(4) == 0] solve, a, b → [2.0, 0.0]
