# Straßenbahn
# a)
# 1)
# Die Steigung dieser Funktion spiegelt eine Beschleunigung wider.
# 2)
v(t) := v_a + □/□  # error: Fehlender Term oder Ausdruck.
# b)
clear(g)
g(x) := a*x^3 + b*x^2 + c*x + d  # error: Diese Variable ist nicht definiert. Prüfen Sie, ob die Beschriftung richtig festgelegt ist.
g'(x) := d/dx(g(x))  # error: Diese Variable ist nicht definiert. Prüfen Sie, ob die Beschriftung richtig festgelegt ist.
# 1)
[a, b, c, d] := [g(1) == 0; g(5) == 4; g'(1) == 0; g'(5) == 1] solve, a, b, c, d → [-1/16, 11/16, -19/16, 9/16]
g(x) := a*x^3 + b*x^2 + c*x + d
g'(x) := d/dx(g(x))
# 2)
integral(sqrt(1 + g'(x)^2), x = 1 .. 5) = 5.77836  # 5.78km
# c)
# 2)
b := 2072
c := 1573
α := 25.1 deg
β := α*2
a := sqrt(b^2 + c^2 - 2*b*c*cos(β)) = 1610.88
# TS= 1611mm
# Kunstvolle Becher
# a) | 1) | ????
f(x) := 0.117*x^2 - 1.18*x + 5
g(x) := 0.0952*x^2 - 1.9*x + 12.1
# 2)
f(x) == g(x) solve, x → [-40.9758217085; 7.94829877267]
f(7.94829877267) → 3.01253549367
g(7.94829877267) → 3.01253549367
# [7.94829877267/3.01253549367]
# 3)
f'(x) := d/dx(f(x))
g'(x) := d/dx(g(x))
f'(7.94829877267) → 0.679901912805
g'(7.94829877267) → -0.386643913683
|atan(0.679901912805)| + |atan(-0.386643913683)| = 55.3505 deg
# Es ändert sich nur der Koeffizient 5
# b)
g(x) := 1/2*x + 7/2
# c)
# 1) | 2700
# 2)
1.5*10^-10 → 0.15*10^-9
0.15*10^-9 - 0.04*10^-9 = 1.1e-10
0.11*10^-9
# Aufgabe 10
# a)
# 1)
kg/(kg/m^3*m^2) == kg/(kg/m) == kg/1/(kg/m) == kg/1*m/kg == m
# b)
# 1)
dE/dW == -k*E
dE/E == -k*dW
integral(1/E, W) == integral(-k, W)
ln*|E(W)| == -k*W + C
# 2)
E(W) == e^(-k*W)*C
