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# 1.
# i.
V == (a + c)*h/2*H
# V == k/2*H <=> (a + c)*h == k
k == (a + c)*h  # Richtig
# ii.
V == 1/n*H
# <=>
(a + c)*h/2 == n
# Falsch
(a + c)*h/2*H == 1/n*H solve, n → 2/((c + a)*h)
# iii.
V == (a + c)*h/2*H solve, a, simplify → -c + 2*V/(H*h)  # Richtig
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# 2.
# 1. Ist Richtig
# 3.
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x := 5
y := 5
z := 4
T := x*y^2/z
T → 125/4
# A. Richtig
# B. Richtig
# C. Richtig
# D. Richtig
# E. Falsch X
# 4.
clear(x, C)
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g(x) := -3/2*x + 15
f(x) := x^2 - 3*x + C
g(x) == f(-2) solve, x, C → [10/3, 0]
g(10/3) → 10
# C = 0
f(-2) → C + 10
# 5.
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P(t) := 300000/(300 + 700*e^(-0.2*t))
# a)
P(t) == 900 solve, t → 15.2226121886  # Nach rund 16 Jahren
# b)
P(t) == 1000 solve, t → 294.468969105  # Die Population kann nur unter der Vorraussetzung 1000 erreichen wenn keine Tiere sterben da dies 294 Jahre dauern würde.
# c)
a := 10
N(t) := 300000/(300 + 700*e^(a*t))  # Umso größer a wird desto kleiner wird das Wachstum
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# 6.
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# 1. 1 Feld
x^2 == 2*x - 1 solve, x → [1; 1]
# 2.  2 Feld
# 7.
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# a)
G := 24300
f(x) := G*0.86^x
# b)
f(x) == 24300/2 solve, x → 4.59576912881  # Nach 4.6 Jahren ist es nurmehr die Hälfte wert
# c)
f(0) - f(1) → 3402.0  # Der Wertverlust ist 3402 Euro
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# 8.
# 1. Falsch
# 2. Falsch
# 3. Falsch
# 4. Richtig
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# 9.
a := 20
a_2 := 40
# a)
s(t) := 1/2*a*t^2
s_2(t) := 1/2*a_2*t^2
# [plot: s(t), s_2(t) vs t]
# i.
# ii. | Der Graph wird steiler
# b)
s_3(t) := 1/2*a*(t - 2)^2
# 10.
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A(t) := 15*e^(0.39*t)
# a)
A(0) → 15.0  # Es werden 15 Milchsäure Bakterien in die Nährlösung gegeben.
# b)
A(8) → 339.695694648  # Nach 8 Stunden befinden sich 339Bakterien in der Nährlösung
# 11.
clear(k, t, K, C)
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T(t) := 28 - (28 - 4)*e^(-k*t)
# a)
T(2) == 8 solve, k → -ln(5/6)/2  # Ja es gilt
# b)
T1(t) := K*(1 - C*a^t)
# !!!!!!
# 12.
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# A. Richtig wenn der Exponent <0 ist, Ist das Ergebnis immer größer 1
0.7^-0.1 → 1.03631120991
# B. Falsch
1.1^-0.1 → 0.990514258215
# C. Richtig weil a <0 ist also das Ergebnis immer kleiner wird.
# D. Richtig weil a <0 ist also das Ergebnis immer kleiner wird.
# E. Richtig
# 13.
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# 1. Falsch
# 2. Richtig
# 3. Falsch
# 4. Falsch
# 5. Falsch
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# 14.
0.95*0.90 = 0.855  # Kein Schaden zu 85,5%
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# 15.
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X := [17; 17; 20; 20; 20; 21; 21; 21; 22; 24; 24; 24; 24]
Stdev(X) = 2.44425
mean(X) = 21.1538
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# 1. Richtig | 4.Falsch
# 2. Richtig | 5.Falsch
# 3. Richtig
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2/6 → 1/3 = 0.333333  # Ein rotes zu bekommen hat eine Wahrscheinlichkeit von 33.3%
# 16.
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# a)
# Logisch
# b)
# 17.
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X := [82; 91; 88; 73; 85; 77; 81; 89; 75; 79; 80; 71]
μ := mean(X) = 80.9167
σ := 3.8
α := 0.01
n := 12
μ + qnorm(1 - α/2, 0, 1)*σ/sqrt(n) = 83.7423
# [78.091/83.742]
μ - qnorm(1 - α/2, 0, 1)*σ/sqrt(n) = 78.0911
# 18.
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# a) | Erwartungswert = 1.5
# Standardabweichung = 0.5
# b) | 0.5
# 0.954
# c)
σ := 0.65
μ := 80
# i.
pnorm(79, μ, σ) = 0.0619679  # 6.2%
# ii.
pnorm(81, μ, σ) - pnorm(79.5, μ, σ) = 0.717154  # 71.7%
# iii.
z := qnorm(0.05, 0, 1) = -1.64485
x := 80
z == (x - μ1)/σ solve, μ1 → 81.0691548575
# 19.
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X := [82; 91; 88; 73; 85; 77; 81; 89; 75; 79; 80; 71]
μ := mean(X) = 80.9167
σ := 3.8
α := 0.01
n := 12
μ + qnorm(1 - α/2, 0, 1)*σ/sqrt(n) = 83.7423
# [78.091/83.742]
μ - qnorm(1 - α/2, 0, 1)*σ/sqrt(n) = 78.0911
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# 20.
# a)
clear(n)
α := 0.05
μ := 1500*0.4 = 600
σ := sqrt(1500*0.4*(1 - 0.4)) = 18.9737
μ_u := qnorm(α/2, μ, σ/sqrt(1500)) = 599.04
μ_u := qnorm(1 - α/2, μ, σ/sqrt(1500)) = 600.96
# b)
p := 0.288
n := 10
# P(X>=2) = 1-P(X<=2)
1 - pbinom(2, n, p) = 0.584578  # 58.5%
# 21.
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# Die Wahrscheinlich dafür das entweder 3 Gelbe oder 3 Blaue gezogen werden bei 5 Ziehungen.
# 22.
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# 1)C)
# 2)B)
# 23.
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# A)
# B)
# C)
# D)
# E)
# 24.
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# A) Falsch
# B) Falsch
# C) Richtig
# D) Richtig
# E) Richtig
# 25.
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# a)
# b)
0.5*0.02 + 0.3*0.03 + 0.2*0.05 = 0.029  # zu 2.9% ist es ein Ausschuss
# c)
0.5*0.02/(0.5*0.02 + 0.3*0.03 + 0.2*0.05) = 0.344828  # Zu 34.5% ist es von M1
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# 26.
# a)
# Es gibt 0 oder nicht also eine Entscheidung zwischen 2 gegebenheiten
# b)
# 1-P(X<=2)
pbinom(2, 10, 0.37) = 0.220571  # 22.1% haben die Blutgruppe 0
# c)
# Die Wahrscheinlichkeit dass mindestens 1 person die Blutgruppe 0 hat.
# 27.
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# A) Falsch
# B) Falsch
# C) Richtig
# D) Richtig
# E) Richtig
# 28.
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μ := 125
σ := 1.5
# a)
1 - pnorm(122, μ, σ) = 0.97725  # 97.7%
# b)
qnorm(0.85, μ, σ) = 126.555  # 126.555
# 29.
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α := 0.15
μ := 600
clear(σ)
z := qnorm(1 - α, 0, 1) = 1.03643
# a)
σ := (700 - 600)/σ == z solve, σ → 96.4847341022
# b)
pnorm(650, μ, σ) - pnorm(450, μ, σ) = 0.637832
# c)
α := 0.1
z := qnorm(1 - α/2, 0, 1) = 1.64485
μ_u := qnorm(α/2, μ, σ) = 441.297
μ_s := μ - z*σ → 441.296735166
μ_o := qnorm(1 - α/2, μ, σ) = 758.703
μ_o := μ + z*σ → 758.703264834
# d)
α := 0.05
qnorm(1 - α, μ, σ) = 758.703
# 30.
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X := [10.42; 11.86; 8.9; 10.28; 9.86; 11.31; 8.57; 9.42; 11.31; 8.36]
σ := Stdev(X) = 1.22196
μ := mean(X) = 10.029
α := 0.01
μ + qt(1 - α/2, n - 1)*σ/sqrt(n) = 11.2848
# [8.773/11.285]
μ - qt(1 - α/2, n - 1)*σ/sqrt(n) = 8.77321
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# 31.
n := 20
σ := 50
μ := 150
α := 0.05
μ + qt(1 - α/2, n - 1)*σ/sqrt(n) = 173.401
# D
μ - qt(1 - α/2, n - 1)*σ/sqrt(n) = 126.599
# 32.
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# a)
z_1 := qnorm(0.05, 0, 1) = -1.64485
clear(μ, σ)
z_2 := qnorm(1 - 0.01, 0, 1) = 2.32635
[(21.9 - μ)/σ == z_1; (22.2 - μ)/σ == z_2] solve, μ, σ → [22.0242586376, 0.0755438876433]
# b)
pnorm(22.1, 22.2, 0.01509) - pnorm(22, 22.2, 0.01509) = 1.71399e-11
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# 33.
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# 1) C
# 2) D
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# 34.
# C
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# 35.
# a)
μ := 30
σ := 0.05
pnorm(30.1, μ, σ) - pnorm(30, μ, σ) = 0.47725  # Zu 47.7% liegt es zwischen 30.1 und 30ml
# b)
pnorm(29.9, μ, σ) = 0.0227501  # 2.3% haben weniger als 29.9ml
α := 0.5% → 0.005
# c)
z := qnorm(α, 0, 1) = -2.57583
clear(x)
(30 - x)/σ == z solve, x → 30.1287914652  # Es muss auf 30.12 ml gestellt werden
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# 36.
X := [10.42; 11.86; 8.9; 10.28; 9.86; 11.31; 8.57; 9.42; 11.31; 8.36]
σ := Stdev(X) = 1.22196
μ := mean(X) = 10.029
n := 10
μ + qt(1 - α/2, n - 1)*σ/sqrt(n) = 11.4548
α := 0.01
μ - qt(1 - α/2, n - 1)*σ/sqrt(n) = 8.77321  # [8.773/11.285]
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# 37.
μ := 6320
σ := 250
α := 0.1
n := 50
μ + qt(1 - α/2, n - 1)*σ/sqrt(n) = 6379.28
# D ist richtig
μ - qt(1 - α/2, n - 1)*σ/sqrt(n) = 6260.72
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# 38.
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clear(x)
# a)
f(x) := 1/24*(x^4 - 18*x^2 + 81)
f'(x) := d/dx(f(x))
f(x) == 0 solve, x → [3; 3; -3; -3]
f'(3) → 0
f'(-3) → 0
# b)
h := f(0) → 27/8 = 3.375  # Ist 3.375 Meter Hoch
# c)
h/2 == f(x) solve, x → [-3.91968889463; -1.62358830044; 1.62358830044; 3.91968889463]
b := 2*1.62358830044 = 3.24718
# d)
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# 39.
# 1) 1.5 | 2) P(0 <= Z <= 0.5)
# 40.
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4.6 - 1.8 → 2.8
q1 := 0.8*100/2.8 → 28.5714285714
2.6 - 1.8 → 0.8
q2 := 2*100/2.8 → 71.4285714286
3.8 - 1.8 → 2.0
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# 41.
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# a) Winkel zwischen a und Strichlierter linie
# b)
x := sqrt(a^2 + s^2 - 2*a*s*cos(α + 90*deg))  # error: Dieser Wert muss ein Skalar oder ein Vektor sein.
# c)
a := 73
s := 1.5
α := 48 deg
x := sqrt(a^2 + s^2 - 2*a*s*cos(α + 90 deg)) = 74.1215  # cm
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# 42.
c := 0.6
d := 0.8
h := 1
h2 := 0.8
b := sin(65*deg) == h2/hyp solve, hyp → 0.8/sin(65.0*deg) = 0.882702
γ := 360*deg - 90*deg*2 - 115*deg → 65*deg
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# 43.
X := [1; 2; 3; 4; 5]
Y := [13; 24; 39; 68; 117]
vg := [1; 1]
f(t, a, λ) := a*e^(λ*t)
[a; λ] := genfit(X, Y, vg, f) = [7.78908; 0.541789]
f(t) := a*e^(λ*t)
f(t) → 7.78908197784*2.71828182846^(0.541788852422*t)
f(6) → 201.030396146  # Es sind 201 Bakterien zum Zeitpunkt 6 Stunden
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# 44.
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clear(x, a, d)
# a)
# Die maximal geschwindigkeit ist 90 km/h
25*3.6 = 90
# b)
f(x) := a*x + d
[f(1) == 15; f(3) == 25] solve, a, d → [5, 10]
f(x) := 5*x + 10
# c)
s(t) := -1/3*t^3 + 2*t^2 + 1/3*t
# i.
s(0) assume, 0 ≤ t ≤ 3 → 0
# ii.
s(t) == 0 assume, 0 ≤ t ≤ 3; solve, t → 0
s'(t) := d/dt(s(t))
# 45.
K(x) := a*x^3 + b*x^2 + c*x + d
K'(x) := d^2/dx^2(K(x)) → 6.0*a*x + 1.76540467034
C(x) := K(x)/x → (a*x^3 + 0.88270233517*x^2 + 0.6*x + d)/x
C'(x) := d/dx(C(x)) → 2.0*a*x + (0.88270233517 - 1.0*d/x^2)
K'(10) == 0
K(25) == 22500
C'(25) == 0
[K(10) == 250; C'(25) == 0; K'(10) == 0; K(25) == 22500] → [
    d + 1000.0*a + 94.270233517 == 250.0;
    -0.0016*d + 50.0*a + 0.88270233517 == 0.0;
    60.0*a + 1.76540467034 == 0.0;
    d + 15625.0*a + 566.688959481 == 22500.0
]
K(x) := -1.296*x^3 + 38.889*x^2 + 1386.111*x - 16203.704
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# 46.
# 1) Richtig
# 2) Falsch
# 3) Falsch
# 4) Falsch
# 5) Richtig
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# 47.
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# a)
K(x) := 0.2*x^2 + 8*x + 280 - 500/(x + 4)
n(x) := 220 - 4*x
E(x) := n(x)*x → x*(-(4*x) + 220)
G(x) := E(x) - K(x) → 500.0/(x + 4.0) + (x*(220.0 - 4.0*x) - (0.2*x^2 + 8.0*x + 280.0))
G'(x) := d/dx(G(x))
G'(x) == 0 solve, x → [-5.3939819028; -2.53605427908; 25.16813142]
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# 48.
A1 := integral(f(x), x = -2 .. 0)
A2 := |integral(f(x), x = 0 .. 2)|
A3 := integral(f(x), x = 2 .. 3)
clear(x)
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# 49.
f(x) := -0.00108*x^3 + 0.046*x^2 - 0.4367*x + 3
# a)
f'(x) := d/dx(f(x))
f''(x) := d/dx(f'(x))
f'(x) == 0 solve, x → [6.0252648368; 22.3697968916]
f(6.0252648368)*2 → 3.60500616254  # Engste Stelle
f(22.3697968916)*2 → 8.3206525277  # Breiteste Stelle
# b)
π*integral(f(x)^2, x = 2 .. 23) → 574.304703033  # cm^3
574.304703033/1000 = 0.574305  # Liter
π*integral(f(x)^2, x = 2 .. t) == 800 solve, t; assume, t > 0 → 27.9510708859
# Die Vase muss 28cm groß sein
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# 50.
W(t) := 1/10*t^2
integral(W(t), t = 0 .. 10) → 100/3 = 33.3333  # Die Pflanze ist in 10 Tagen 33.333cm gewachsen.
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# 51.
f(x) := 85/5 - 116/1125*x^2
f'(x) := d/dx(f(x))
# a)
α := 180 deg - |atan(f'(7.5))|
# b)
45 + 6*integral(sqrt(1 + f'(x)^2), x = 0 .. 7.5) → 104.193476826
# 52.
clear(z, α, μ, σ)
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α := 0.05
z_1 := qnorm(α/2, 0, 1) = -1.95996
z_2 := qnorm(1 - α/2, 0, 1) = 1.95996
# a)
[μ, σ] := [(2500 - μ)/σ == z_1; (4500 - μ)/σ == z_2] solve, μ, σ → [3500, 510.213456925]
# [plot: f(x), pnorm(x, μ, σ) vs x]
# b)
# c)
1 - pnorm(4000, μ, σ) = 0.163548  # A: Mit einer Wahrscheinlichkeit von 16.35 % wiegt ein Neugeborenes mehr als wie 4 kg.
# 53.
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# a)
AC := 28
CB := 115 - 28 → 87
α := 120 deg = 2.0944
AB := sqrt(AC^2 + CB^2 - 2*AC*CB*cos(α)) → 103.870111197
# A: AB ist 103.87 cm lang
# b)
[AC, CB] := [AB == sqrt(AC_n^2 + CB_n^2); AC_n + CB_n == 115] solve, AC_n, CB_n; assume, AC_n < CB_n → [11.802625896, 103.197374104]
AC → 11.802625896  # A: Von Punkt A zu Punkt C liegt dann eine Entfernung von 11.802 cm
# 54.
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# a) 6 ist der durchschnittliche Wasserspiegel
# b) Es werden die Zeitpunkte an denen der Wasserspiegel am höchsten/ niedrigsten ist.
# 55.
clear(a, b, c)
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b_4(v) := a*v^2 + b*v + c
b'_4(v) := d/dv(b_4(v)) → 2*a*v + b
[a, b, c] := [b'_4(40) == 0; b_4(40) == 3.9; b_4(100) == 6] solve, a, b, c → [0.000583333333333, -0.0466666666667, 4.83333333333]
b_4(v) := a*v^2 + b*v + c
b_4(v) → 0.000583333333333*v^2 - 0.0466666666667*v + 4.83333333333
# 56.
A := 10
b := π/180
c := 13
# 57.
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# a)
μ := 3
σ := 0.25
1 - pnorm(3.5, μ, σ) = 0.0227501  # 2.3%
# b)
qnorm(0.95, μ, σ) = 3.41121
# [2.589/3.411]
qnorm(0.05, μ, σ) = 2.58879
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# 58.
# 75 | 77
# 59.
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h(x) := e^(-0.181*x^2) - 0.915
3*integral(h(x), x = -0.7 .. 0.7) → 0.236069107787
# A: Hier wird die Fläche einer Bremsschwelle berechnet
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# 60.
f(x) := 1/(0.1*x + 0.35) - 0.85
f(x) == 0 solve, x → 8.26470588235
π*integral(f(x)^2, x = 0 .. 8.26470588235) → 17.0678979488  # VE
# 61.
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# a)
X := [3; 4; 5; 6; 9.5; 11; 17]
Y := [130; 250; 280; 350; 600; 800; 1000]
vg := [1; 1]
f(x, k, d) := k*x + d
[k; d] := genfit(X, Y, vg, f) = [63.9717; -20.0611]
f(x) := k*x + d
f(x) → 63.9716658526*x - 20.0610649732
# [plot: f(x) vs x]
# c)
f(15) → 939.513922816  # Es sind 939 Lumen zu erwarten
# 62.
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α := 2.46 deg
GK := 3007 - 800 → 2207
β1 := 14.26 deg
β2 := 17.23 deg
λ1 := 90*deg - β1 → 75.74*deg
λ2 := 90*deg - β2 → 72.77*deg
λ := λ2 + λ1 → 148.51*deg
γ := 180*deg - λ - α → 29.03*deg
sin(β2) == GK/HYP solve, HYP → 2207.0/sin(17.23*deg) = 7450.84
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# 63.
clear(t, p)
# a)
p(t) := 0.0066*t^2 - 1.1134*t + 36.2106
# [plot: p(t) vs t]
# b)
p'(t) := d/dt(p(t)) → 0.0132*t - 1.1134
p'(t) == 0 solve, t → 84.3484848485
# Zum Zeitpunkt 84.34 Stunden steigt der Wasserspiegel am stärksten
P(x) := 0.0022*x^3 - 0.5567*x^2 + 36.2106*x + 700
P'(x) := d/dx(P(x)) → 0.0066*x^2 - 1.1134*x + 36.2106
# Ja kann eine sein weil die 1ste ableitung von P(X) = p(x)
# 64.
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clear(k, x, d)
k := 0.1
y(x) := -1/20*x^2
# a)
g(x) := k*x + d
y'(x) := d/dx(y(x)) → -x/10
y'(x) == 0.1 solve, x → -1.0
# b)
P := [-1; -1/20]
k := 0.1
d := -1/20 == -1*k + d solve, d → 0.05
g(x) := k*x + d → 0.1*x + 0.05
# c)
y(-20) - g(-20) → -18.05
y(15) - g(15) → -12.8
# d)
h(x) := 1/100*x^3 - 3/4*x^2 + 4
# 65.
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# a)
X := [1; 2; 3; 4; 5]
Y := [13; 24; 39; 68; 119]
vg := [1; 1]
f(t, λ, a) := a*e^(λ*t)
[λ; a] := genfit(X, Y, vg, f) = [0.55022; 7.58347]
# b)
f(t) := a*e^(λ*t)
f(t) → 7.5834734151*2.71828182846^(0.550219634895*t)
f(6) → 205.879107197
# 66.
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clear(a, b, c, d, x, y, f)
f(x) := a*x^3 + b*x^2 + c*x + d
f'(x) := d/dx(f(x)) → 3*a*x^2 + 2*b*x + c
f''(x) := d^2/dx^2(f(x)) → 6*a*x + 2*b
[a, b, c, d] := [f'(-3/2) == -5/4; f'(0) == 1; f(0) == 2/3; f''(0) == 0] solve, a, b, c, d → [-1/3, 0, 1, 2/3]
f(x) := a*x^3 + b*x^2 + c*x + d
f(x) → -x^3/3 + 2/3 + x
clear(a, b, c, d, x, y, f)
y(x) := a*x^2 + b*x + c
y'(x) := d/dx(y(x))
[a, b, c] := [y(-3/2) == 1/2; y(0) == 2/3; y'(0) == 0] solve, a, b, c → [-2/27, 0, 2/3]
y(x) := a*x^2 + b*x + c
y(x) → -2*x^2/27 + 2/3
# 67.
# A: Hier wird die Fläche einer Bremsschwelle berechnet
